DENSITY   = 8.0e-6
YOUNG     = 210000.0
MP,EX,1,YOUNG
MP,NUXY,1,0.3
MP,DENS,1,DENSITY

et,1,solid186

MSHKEY,0
MSHAPE,1,3d
VMESH,all
ASEL,ALL
FINISH
/SOL

FLST,2,2,4,ORDE,2
FITEM,2,9
FITEM,2,12
!*
/GO
DL,P51X, ,ALL,
FLST,2,1,5,ORDE,1
FITEM,2,6
/GO
!*
SFA,P51X,1,PRES,20000

SOLVE


/POST1
SET,FIRST

NSORT, S, EQV
*GET, STRESS_MAX, SORT, , MAX
*STATUS,STRESS_MAX

AVPRIN,0, ,
ETABLE,EVolume,VOLU,
SSUM

*GET,total_vol,SSUM, ,ITEM,EVOLUME
*STATUS,total_vol
