!~SATIN,'prisme_top','sat','.\igs\',SOLIDS,0

!add parameters
/PREP7
DENSITY   = 7.85e-6
YOUNG     = 210000.0
MP,EX,1,YOUNG
MP,NUXY,1,0.3
MP,DENS,1,DENSITY
et,1,solid186

!generate mesh
!SMRT,10   !! smart size of meshing [1-10]
MSHKEY,0
MSHAPE,1,3d
VMESH,all
ASEL,ALL

!add displacement
FLST,2,2,5,ORDE,2
FITEM,2,1
FITEM,2,14
!*
/GO
DA,P51X,ALL,

!add presure 5000PA
FLST,2,2,5,ORDE,2
FITEM,2,6
FITEM,2,-7
/GO
!*
SFA,P51X,1,PRES,5000
